OpenVSP model (file version 5), 6 components.
Geometry view with OpenVSP parameter names; values to 6 digits, angles in degrees, lengths in the model's unit.
Overall bounding box: X_Min=-0.0693937 X_Len=20.3877 Y_Min=-9.73 Y_Len=19.46 Z_Min=-1.17884 Z_Len=4.8251

Fuselage "FuselageGeom"
  location (X Y Z) 0 0 0.217391, rotation 0 0 0
  bounding box size 18.6894 2.34694 2.36856
  Design: Length=18.62
  cross sections:
    n  XLocPercent  YLocPercent  ZLocPercent  shape
    0  0            0            -0.03        circle Circle_Diameter=0.3
    1  0.033228     0            -0.026       circle Circle_Diameter=0.9
    2  0.17212      0            0            circle Circle_Diameter=2.34
    3  0.5          0            0            as above
    4  0.673919     0            0            as above
    5  0.715047     0            0.003        circle Circle_Diameter=2.20551
    6  0.857129     0            0.018        circle Circle_Diameter=1.36219
    7  0.928564     0            0.0263       circle Circle_Diameter=0.94
    8  1            0            0.034        circle Circle_Diameter=0.55

Wing "WingGeom"
  location (X Y Z) 7.12174 0 -0.978261, rotation 0 0 0
  symmetric about XZ
  bounding box size 6.75762 19.46 0.401156
  totals: TotalSpan=19.46 TotalProjectedSpan=19.46 TotalChord=2.575 TotalArea=50.1095 TotalAR=7.55728
  root: chord 4.01, twist 0, NACA 4-series Camber=0 CamberLoc=0.2 ThickChord=0.1
  sections:
    n  Span  Root_Chord  Tip_Chord  Area     Sweep  Sweep_Location  Dihedral  Twist  Twist_Location  tip airfoil
    1  9.73  4.01        1.14       25.0547  30     0               0         0      0.25            as above

Wing "WingGeom"
  location (X Y Z) 15.2717 0 1.08, rotation 90 0 0
  bounding box size 4.93803 0.300117 2.56626
  totals: TotalSpan=2.46 TotalProjectedSpan=2.46 TotalChord=2.65 TotalArea=6.519 TotalAR=0.928302
  root: chord 3, twist 0, NACA 4-series Camber=0 CamberLoc=0.2 ThickChord=0.1
  sections:
    n  Span  Root_Chord  Tip_Chord  Area   Sweep  Sweep_Location  Dihedral  Twist  Twist_Location  tip airfoil
    1  2.46  3           2.3        6.519  47     0               0         0      0.25            as above

Wing "WingGeom"
  location (X Y Z) 17.2283 0 2.95348, rotation 0 0 0
  symmetric about XZ
  bounding box size 3.09001 7.24 0.189693
  totals: TotalSpan=7.24 TotalProjectedSpan=7.24 TotalChord=1.44792 TotalArea=10.4829 TotalAR=5.00029
  root: chord 1.89583, twist 0, NACA 4-series Camber=0 CamberLoc=0.2 ThickChord=0.1
  sections:
    n  Span  Root_Chord  Tip_Chord  Area     Sweep  Sweep_Location  Dihedral  Twist  Twist_Location  tip airfoil
    1  3.62  1.89583     1          5.24146  30     0               0         0      0.25            as above

Wing "WingGeom"
  location (X Y Z) 13.1696 0.578 0.6, rotation 0 0 0
  symmetric about XZ
  bounding box size 2.8544 2.43515 0.285551
  totals: TotalSpan=1.27915 TotalProjectedSpan=1.27915 TotalChord=2.5222 TotalArea=3.22626 TotalAR=0.507155
  root: chord 2.8544, twist 0, NACA 4-series Camber=0 CamberLoc=0.2 ThickChord=0.1
  sections:
    n  Span      Root_Chord  Tip_Chord  Area     Sweep  Sweep_Location  Dihedral  Twist  Twist_Location  tip airfoil
    1  0.639574  2.8544      2.19       1.61313  0      0               0         0      0.25            as above

Custom "Duct", child of "WingGeom"
  location (X Y Z) 14.3295 -1.83 0.6, rotation 0 0 0
  symmetric about XZ
  bounding box size 2.93279 5.04022 1.3834
  Design: Camber=0.00132494 CamberLoc=0.9 Chord=2.93279 Height=1.10749 InvertFlag=0 Shape=0.02 ThickChord=0.0891667 Width=1.12247
  custom script Duct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
